// COMSOL Multiphysics 6.3.0.290 model "model_output_Model.mph"
// Outline of the model tree

Parameters
  lambda0 = 1.55[um]
  freq0 = c_const/lambda0
  t_bcb = 6.6[um]
  n_search = 1.536
  beta_search = 1.536

Geometry
  geom1 "几何 1" (2D, length unit µm)
    all: Rectangle "矩形" | size = {24, (t_bcb+10)}; pos = {-12, -6}
    si: Rectangle "矩形 2" | size = {24, 2}; pos = {-12, -6}
    sio2: Rectangle "矩形 2a" | size = {24, 4}; pos = {-12, -4}
    bcb: Rectangle "矩形 3" | size = {24, t_bcb}; pos = {-12, 0}
    air: Rectangle "矩形 4" | size = {24, 4}; pos = {-12, t_bcb}
    au: Rectangle "矩形 5" | size = {4.6, 0.036}; pos = {-4.6, 3.3}
    su8: Rectangle "矩形 8" | size = {2.0, 1.5}; pos = {2.5, 3.3}
    fin: Finalize "形成联合体"

Materials
  mat1: Common "材料 1" on all domains
    def: def "基本"
      relpermittivity = if((x>=-4.6[um]&&x<=0[um]&&y>=3.3[um]&&y<=3.336[um]),(-132+12.65*i),if((x>=2.5[um]&&x<=4.5[um]&&y>=3.3[um]&&y<=4.8[um]),(1.57+8e-5*i)^2,if(y< -4[um],(3.48)^2,if(y<0[um],(1.444)^2,if(y<t_bcb,(1.535)^2,1)))))
      relpermeability = 1

Physics
  emw: ElectromagneticWavesFrequencyDomain "电磁波，频域" on all domains
    dependent variable E = {Ex, Ey, Ez}
    wee1: WaveEquationElectric "波动方程，电 1" (default)
    pec1: PerfectElectricConductor "理想电导体 1" (default)
    init1: init "初始值 1" (default)
    sctr1: Scattering "散射边界条件 1" on all boundaries

Mesh
  mesh1 "网格 1"
    size: MeshSizeDefault "大小" | hauto = 4
    ftri1: FreeTri "自由三角形网格 1" on remaining entities

Studies
  std1 "研究 1"
    mode: ModeAnalysis "模式分析" | modeFreq = freq0; neigs = 8; shift = beta_search

Solver configurations
  sol1 "解 1" (study std1)
    v1: Variables "因变量 1"
    e1: Eigenvalue "特征值求解器 1"
      d1: Direct "建议的直接求解器 (emw)"

Datasets
  dset1: Solution | solution = sol1