// COMSOL Multiphysics 6.3.0.290 model "model_output_Model.mph"
// Outline of the model tree

Parameters
  lambda0 = 1.55[um]
  k0 = 2*pi/lambda0
  t_bcb = 10.0[um]
  shift_beta2 = -(2*pi/lambda0)^2*(1.536)^2

Variables
  var1 "变量 1"
    epsr = if((x>=-4.6[um]&&x<=0[um]&&y>=3.3[um]&&y<=3.336[um]),(-132+12.65*i),if((x>=2.5[um]&&x<=4.5[um]&&y>=3.3[um]&&y<=4.8[um]),(1.57+8e-5*i)^2,if(y<0[um],(1.444)^2,if(y<t_bcb,(1.535)^2,1))))

Geometry
  geom1 "几何 1" (2D, length unit µm)
    all: Rectangle "矩形" | size = {16, (t_bcb+6)}; pos = {-8, -4}
    sio2: Rectangle "矩形 2" | size = {16, 4}; pos = {-8, -4}
    bcb: Rectangle "矩形 3" | size = {16, t_bcb}; pos = {-8, 0}
    air: Rectangle "矩形 4" | size = {16, 2}; pos = {-8, t_bcb}
    au: Rectangle "矩形 5" | size = {4.6, 0.036}; pos = {-4.6, 3.3}
    su8: Rectangle "矩形 8" | size = {2.0, 1.5}; pos = {2.5, 3.3}
    fin: Finalize "形成联合体"

Physics
  c: CoefficientFormPDE "系数形式偏微分方程" on all domains
    dependent variable u
    cfeq1: CoefficientFormPDE "系数形式偏微分方程 1" (default) | c = {1/epsr, 0, 0, 1/epsr}; a = -k0^2; f = 0; da = 1/epsr
    zflx1: ZeroFluxBoundary "零通量 1" (default)
    init1: init "初始值 1" (default)
    dir1: DirichletBoundary "狄利克雷边界条件 1" on all boundaries | r = 0

Mesh
  mesh1 "网格 1"
    size: MeshSizeDefault "大小" | hmax = 1.07; hmin = 0.0048; hcurve = 0.3; hgrad = 1.3
    ftri1: FreeTri "自由三角形网格 1" on remaining entities | smoothmaxiter = 4; smoothmaxdepth = 4
    size1: Size "大小 1" on entire geometry | hmax = 0.09; hmin = 0.006
    ftri_user: FreeTri "自由三角形网格" on remaining entities

Studies
  std1 "研究 1"
    eig: Eigenvalue "特征值" | neigs = 16; shift = shift_beta2

Solver configurations
  sol1 "解 1" (study std1)
    v1: Variables "因变量 1"
    e1: Eigenvalue "特征值求解器 1"
      dDef: Direct "直接"

Datasets
  dset1: Solution | solution = sol1